# OpenSim document version 30000
AnalyzeTool subject_so:
  replace_force_set: false
  force_set_files: so_actuators.xml
  results_directory: results
  output_precision: 8
  initial_time: 0
  final_time: 0.72
  solve_for_equilibrium_for_auxiliary_states: false
  maximum_number_of_integrator_steps: 20000
  maximum_integrator_step_size: 1
  minimum_integrator_step_size: 1e-8
  integrator_error_tolerance: 1e-5
  external_loads_file: grf_setup.xml
  coordinates_file: D:/Reginaldo/OpenSim/Mod&Sim2018/SO/../IK/results/ik_output_run.mot
  lowpass_cutoff_frequency_for_coordinates: 6
  AnalysisSet Analyses:
    StaticOptimization: start_time=0 end_time=0.72 step_interval=1 in_degrees=true use_model_force_set=true
        activation_exponent=2 use_muscle_physiology=true optimizer_convergence_criterion=0.0001
        optimizer_max_iterations=100
